log none

units		lj
atom_style	full

dielectric	0.8333 # dielectric = 1/(bjurrem_length * KbT)

read_data	data.polymer

change_box	all boundary m m m
group		polymer molecule == 1

set		group polymer charge 0.0

read_dump	dump.relax 300000 x y z box no replace yes
neighbor	10.0 bin

velocity all create 1.2 698052 dist gaussian

thermo 10000
thermo_style multi

#######Interaction Parameters##########
pair_style	lj/cut/coul/debye/mod 100.0000 3.11 0.5612 0.0500
pair_coeff	* * 1.00 0.50
pair_modify	shift yes
special_bonds	lj/coul 1.0 1.0 1.0
bond_style	harmonic
bond_coeff	1 1.8 0.0
#######Interaction Parameters##########

minimize 1e-6 1e-4 10000 100000

#########Set up system#################
fix	1 all nve
fix	2 all langevin 1.2 1.2 1.0 188801
########################################

###########Equilibration#################
timestep	0.005
neigh_modify delay 0 every 1 check yes
run	6000000
#########################################

######Computes, fixes, variables, dumps########
compute myGYR polymer gyration
compute atomCharge polymer property/atom q
compute sumatomcharge polymer reduce sum c_atomCharge

variable r equal step
variable s equal temp
variable t equal c_myGYR
variable u equal c_sumatomcharge
variable v equal pe
variable w equal ke
variable x equal ecoul
variable y equal evdwl
variable z equal etotal

fix 5 polymer ave/time 100 1 100 c_myGYR file mu_7.41_debye_0.01.gyr mode scalar
fix 6 polymer ave/time 1000 1 1000 c_sumatomcharge file mu_7.41_debye_0.01.charge mode scalar
fix	7 polymer print 100 '$r $s $t $u $v $w $x $y $z' file mu_7.41_debye_0.01.both
fix	8 polymer ave/atom 1 10000 10000 x y z

dump          id all atom 10000 dump.mu_7.41_debye_0.01
#################################################

#######Run simulation###########################
thermo_style    custom step temp etotal ke pe epair ebond evdwl ecoul v_t v_u
timestep	0.005
neigh_modify delay 0 every 1 check yes
run	6000000
################################################
